// COMSOL Multiphysics 6.2.0.339 model "Block_training.mph"
// Outline of the model tree

Geometry
  geom1 "Geometry 1" (3D, length unit cm)
    blk1: Block | size = {1, 1, 10}
    fin: Finalize "Form Union"

Materials
  mat1: Common "6061 [solid,T6 temper]" on all domains
    def "Basic"
      thermalconductivity = k_solid_T6_temper_1(T)
      resistivity = res(T)
      thermalexpansioncoefficient = (alpha(T)+(Tempref-293[K])*if(abs(T-Tempref)>1e-3,(alpha(T)-alpha(Tempref))/(T-Tempref),d(alpha(T),T)))/(1+alpha(Tempref)*(Tempref-293[K]))
      heatcapacity = C(T)
      electricconductivity = sigma(T)
      density = rho(T)
      TD = TD(T)
      k_solid_T6_temper_1: Piecewise
        arg = T
        pieces = 
          {4.0, 130.0, -1.35437+1.660905*T^1-0.008948206*T^2+2.250241E-5*T^3}
          {130.0, 300.0, 30.71577+0.8750948*T^1-0.002142331*T^2+2.05104E-6*T^3}
          {300.0, 811.0, 79.478+0.3355001*T^1-2.701638E-4*T^2}
        argunit = K
        fununit = W/(m*K)
      res: Piecewise
        arg = T
        pieces = 
          {4.0, 19.7, 1.379978E-8+2.555911E-12*T^1}
          {19.7, 293.0, 1.390705E-8-1.842119E-11*T^1+8.191974E-13*T^2-1.50061E-15*T^3}
        argunit = K
        fununit = ohm*m
      alpha: Piecewise
        arg = T
        pieces = 
          {22.0, 88.0, 1.3648E-5+5.61487E-8*T^1+7.71396E-11*T^2-9.540526E-13*T^3}
          {88.0, 588.0, 1.316461E-5+8.302515E-8*T^1-2.909984E-10*T^2+4.99184E-13*T^3-3.127291E-16*T^4}
        argunit = K
        fununit = 1/K
      C: Piecewise
        arg = T
        pieces = 
          {4.0, 30.0, -1.17115557+0.487569051*T^1-0.0443149197*T^2+0.00232206728*T^3-3.42445087E-6*T^4}
          {30.0, 47.0, 26.582634-1.95690617*T^1+0.00352123139*T^2+0.00324321212*T^3-3.10753881E-5*T^4}
          {47.0, 130.0, -75.1821286-1.13922203*T^1+0.176562541*T^2-0.00147785574*T^3+3.9391632E-6*T^4}
          {130.0, 145.0, -264.783185+9.29321629*T^1-0.0121044208*T^2-6.74100976E-5*T^3+1.6547628E-7*T^4}
          {145.0, 811.0, -5.60596587+6.74472515*T^1-0.0153591209*T^2+1.61975861E-5*T^3-6.21481318E-9*T^4}
        argunit = K
        fununit = J/(kg*K)
      sigma: Piecewise
        arg = T
        pieces = 
          {4.0, 19.7, 1/(2.555911E-12*T+1.379978E-08)}
          {19.7, 293.0, 1/(-1.500610E-15*T^3+8.191974E-13*T^2-1.842119E-11*T+1.390705E-08)}
        argunit = K
        fununit = S/m
      rho: Piecewise
        arg = T
        pieces = 
          {22.0, 88.0, 2733.392-0.04347255*T^1+0.001455455*T^2-2.077034E-5*T^3+7.111E-8*T^4}
          {88.0, 588.0, 2736.099-0.009406248*T^1-6.040342E-4*T^2+8.988964E-7*T^3-5.405225E-10*T^4}
        argunit = K
        fununit = kg/m^3
      TD: Piecewise
        arg = T
        pieces = 
          {20.0, 56.0, 0.008936926-8.204512E-4*T^1+3.204977E-5*T^2-6.428844E-7*T^3+6.522072E-9*T^4-2.653113E-11*T^5}
          {56.0, 135.0, 0.001241242-5.079258E-5*T^1+9.0397E-7*T^2-8.106985E-9*T^3+3.617656E-11*T^4-6.389535E-14*T^5}
          {135.0, 355.0, 1.539249E-4-1.724476E-6*T^1+1.312367E-8*T^2-5.122993E-11*T^3+9.965819E-14*T^4-7.622354E-17*T^5}
          {355.0, 588.0, 8.3013E-5-2.384898E-7*T^1+7.399833E-10*T^2-9.130456E-13*T^3+3.753774E-16*T^4}
        argunit = K
        fununit = m^2/s
    ThermalExpansion
      alphatan = CTE(T)
      dL = (dL(T)-dL(Tempref))/(1+dL(Tempref))
      dL: Piecewise
        arg = T
        pieces = 
          {22.0, 88.0, -0.004101768+5.279196E-6*T^1-1.767226E-7*T^2+2.521432E-9*T^3-8.625342E-12*T^4}
          {88.0, 588.0, -0.00440008765+1.079286E-6*T^1+7.353025E-8*T^2-1.076827E-10*T^3+6.512613E-14*T^4}
        argunit = K
      CTE: Piecewise
        arg = T
        pieces = 
          {0.0, 88.0, 1.243641E-8+3.085851E-8*T^1-1.105852E-9*T^2+4.454763E-11*T^3-2.444182E-13*T^4}
          {88.0, 283.0, -2.17214E-5+6.01631E-7*T^1-3.560537E-9*T^2+1.007751E-11*T^3-1.087698E-14*T^4}
          {283.0, 573.16, 1.542521E-5+2.593871E-8*T^1-9.271321E-12*T^2}
        argunit = K
        fununit = 1/K
    Enu "Young's modulus and Poisson's ratio"
      E = E(T)
      nu = nu(T)
      E: Piecewise | arg = T; pieces = {0.0, 773.0, 7.659324E10+2007396.0*T^1-186458.4*T^2+419.2175*T^3-0.3495083*T^4}; argunit = K; fununit = Pa
      nu: Piecewise | arg = T; pieces = {0.0, 773.0, 0.3238668+3.754548E-6*T^1+2.213647E-7*T^2-6.565023E-10*T^3+4.21277E-13*T^4+3.170505E-16*T^5}; argunit = K
    KG "Bulk modulus and shear modulus"
      K = kappa(T)
      G = mu(T)
      mu: Piecewise | arg = T; pieces = {0.0, 773.0, 2.894653E10-120032.4*T^1-69037.36*T^2+158.6722*T^3-0.1348974*T^4}; argunit = K; fununit = Pa
      kappa: Piecewise | arg = T; pieces = {0.0, 773.0, 7.252413E10+1872882.0*T^1-71106.44*T^2+52.7109*T^3}; argunit = K; fununit = Pa

Physics
  solid: SolidMechanics on all domains
    dependent variable u = {u, v, w}
    lemm1: LinearElasticModel "Linear Elastic Material 1" (default)
    free1: Free (default)
    init1: init "Initial Values 1" (default)
    fix1: Fixed "Fixed Constraint 1" on boundaries 3
    bndl1: BoundaryLoad on boundaries 5 | LoadType = TotalForce; Ftot = {0, 100, 0}

Mesh
  mesh1 "Mesh 1" (physics-controlled)
    size: MeshSizeDefault | hauto = 2

Studies
  std1 "Study 1"
    stat: Stationary

Solver configurations
  sol1 "Solution 1" (study std1)
    v1: Variables "Dependent Variables 1"
    s1: Stationary "Stationary Solver 1"
      fc1: FullyCoupled | linsolver = d1
      d1: Direct "Suggested Direct Solver (solid)" | linsolver = pardiso; pivotperturb = 1.0E-9

Datasets
  dset1: Solution | solution = sol1

Plots
  pg1: PlotGroup3D "Stress (solid)" | data = dset1
    vol1: Volume | expr = solid.misesGp
      def: Deform "Deformation" | expr = {u, v, w}; descr = Displacement field